Y0 := 4.5
Y1 := 1.5
Y2 := 1.5
T1 := 0.4
T2 := 0.5
ω := 0.5
Y(t) = (Y0 + Y1*(1 - e^(-T1*t)) + Y2*sin(wt)*e^(-T2*t))  # error: Эта переменная не определена. Проверьте правильность установки обозначения.
